// SBML level 3 version 2

model combined_model_of__biocrnpyler_129318_biocrnpyler_812450()
  // model units - substance: mole, time: second, volume: litre, area: square_metre, length: metre, extent: mole

  // Compartments:
  compartment default_biocrnpyler_129318_combined = 2e-6;

  // Species:
  species Prod2_OFF_biocrnpyler_129318 in default_biocrnpyler_129318_combined = 5000/default_biocrnpyler_129318_combined;
  species complex_Prod2_ON_biocrnpyler_129318 in default_biocrnpyler_129318_combined = 0;
  species dna_dAP_biocrnpyler_129318 in default_biocrnpyler_129318_combined = 5000/default_biocrnpyler_129318_combined;
  species rna_rR1P_biocrnpyler_129318 in default_biocrnpyler_129318_combined = 0;
  species protein_RNAP_biocrnpyler_129318 in default_biocrnpyler_129318_combined = 200/default_biocrnpyler_129318_combined;
  species protein_RNAseH_biocrnpyler_129318 in default_biocrnpyler_129318_combined = 0;
  species complex_Prod2_AI_biocrnpyler_129318 in default_biocrnpyler_129318_combined = 0;
  species complex_Prod2_ON_protein_RNAP_biocrnpyler_129318 in default_biocrnpyler_129318_combined = 0;
  species complex_Prod2_OFF_protein_RNAP_biocrnpyler_129318 in default_biocrnpyler_129318_combined = 0;
  species complex_Prod2_AI_protein_RNAseH_biocrnpyler_129318 in default_biocrnpyler_129318_combined = 0;
  species BrocApt_biocrnpyler_129318_1_combined in default_biocrnpyler_129318_combined = 0;
  species DFHBI_biocrnpyler_812450 in default_biocrnpyler_129318_combined = 60000/default_biocrnpyler_129318_combined;
  species complex_BrocApt_DFHBI_biocrnpyler_812450 in default_biocrnpyler_129318_combined = 0;

  // Reactions:
  r0_biocrnpyler_129318: Prod2_OFF_biocrnpyler_129318 + dna_dAP_biocrnpyler_129318 => complex_Prod2_ON_biocrnpyler_129318; r0_biocrnpyler_129318_k*Prod2_OFF_biocrnpyler_129318*dna_dAP_biocrnpyler_129318;
    r0_biocrnpyler_129318_k = 0.00394;
  r1_biocrnpyler_129318: complex_Prod2_ON_biocrnpyler_129318 + rna_rR1P_biocrnpyler_129318 => Prod2_OFF_biocrnpyler_129318 + complex_Prod2_AI_biocrnpyler_129318; r1_biocrnpyler_129318_k*complex_Prod2_ON_biocrnpyler_129318*rna_rR1P_biocrnpyler_129318;
    r1_biocrnpyler_129318_k = 0.0696;
  r2_biocrnpyler_129318: dna_dAP_biocrnpyler_129318 + rna_rR1P_biocrnpyler_129318 => complex_Prod2_AI_biocrnpyler_129318; r2_biocrnpyler_129318_k*dna_dAP_biocrnpyler_129318*rna_rR1P_biocrnpyler_129318;
    r2_biocrnpyler_129318_k = 0.0696;
  r3_biocrnpyler_129318: complex_Prod2_ON_biocrnpyler_129318 + protein_RNAP_biocrnpyler_129318 => complex_Prod2_ON_protein_RNAP_biocrnpyler_129318; r3_biocrnpyler_129318_k*complex_Prod2_ON_biocrnpyler_129318*protein_RNAP_biocrnpyler_129318;
    r3_biocrnpyler_129318_k = 38.85714;
  r3_1_biocrnpyler_129318: complex_Prod2_ON_protein_RNAP_biocrnpyler_129318 => complex_Prod2_ON_biocrnpyler_129318 + protein_RNAP_biocrnpyler_129318; r3_1_biocrnpyler_129318_k*complex_Prod2_ON_protein_RNAP_biocrnpyler_129318;
    r3_1_biocrnpyler_129318_k = 10;
  r5_biocrnpyler_129318: complex_Prod2_ON_protein_RNAP_biocrnpyler_129318 => complex_Prod2_ON_biocrnpyler_129318 + BrocApt_biocrnpyler_129318_1_combined + protein_RNAP_biocrnpyler_129318; r5_biocrnpyler_129318_k*complex_Prod2_ON_protein_RNAP_biocrnpyler_129318;
    r5_biocrnpyler_129318_k = 0.064;
  r6_biocrnpyler_129318: Prod2_OFF_biocrnpyler_129318 + protein_RNAP_biocrnpyler_129318 => complex_Prod2_OFF_protein_RNAP_biocrnpyler_129318; r6_biocrnpyler_129318_k*Prod2_OFF_biocrnpyler_129318*protein_RNAP_biocrnpyler_129318;
    r6_biocrnpyler_129318_k = 9.530476;
  r6_1_biocrnpyler_129318: complex_Prod2_OFF_protein_RNAP_biocrnpyler_129318 => Prod2_OFF_biocrnpyler_129318 + protein_RNAP_biocrnpyler_129318; r6_1_biocrnpyler_129318_k*complex_Prod2_OFF_protein_RNAP_biocrnpyler_129318;
    r6_1_biocrnpyler_129318_k = 10;
  r8_biocrnpyler_129318: complex_Prod2_OFF_protein_RNAP_biocrnpyler_129318 => Prod2_OFF_biocrnpyler_129318 + BrocApt_biocrnpyler_129318_1_combined + protein_RNAP_biocrnpyler_129318; r8_biocrnpyler_129318_k*complex_Prod2_OFF_protein_RNAP_biocrnpyler_129318;
    r8_biocrnpyler_129318_k = 0.007;
  r9_biocrnpyler_129318: complex_Prod2_AI_biocrnpyler_129318 + protein_RNAseH_biocrnpyler_129318 => complex_Prod2_AI_protein_RNAseH_biocrnpyler_129318; r9_biocrnpyler_129318_k*complex_Prod2_AI_biocrnpyler_129318*protein_RNAseH_biocrnpyler_129318;
    r9_biocrnpyler_129318_k = 111.8242;
  r9_1_biocrnpyler_129318: complex_Prod2_AI_protein_RNAseH_biocrnpyler_129318 => complex_Prod2_AI_biocrnpyler_129318 + protein_RNAseH_biocrnpyler_129318; r9_1_biocrnpyler_129318_k*complex_Prod2_AI_protein_RNAseH_biocrnpyler_129318;
    r9_1_biocrnpyler_129318_k = 10;
  r11_biocrnpyler_129318: complex_Prod2_AI_protein_RNAseH_biocrnpyler_129318 => dna_dAP_biocrnpyler_129318 + protein_RNAseH_biocrnpyler_129318; r11_biocrnpyler_129318_k*complex_Prod2_AI_protein_RNAseH_biocrnpyler_129318;
    r11_biocrnpyler_129318_k = 0.176;
  r0_biocrnpyler_812450: BrocApt_biocrnpyler_129318_1_combined + DFHBI_biocrnpyler_812450 => complex_BrocApt_DFHBI_biocrnpyler_812450; r0_biocrnpyler_812450_k*BrocApt_biocrnpyler_129318_1_combined*DFHBI_biocrnpyler_812450;
    r0_biocrnpyler_812450_k = 9.96e-5;

  // Unit definitions:
  unit square_metre = metre^2;
end
